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/batch
! ANSYS input file written by Workbench version 15.0.7  Release
! File used for geometry attach: C:\Users\mosta\OneDrive\Documents\ANSYS\FreqDivFull\FreqDivFUll_files\dp0\SYS-5\DM\SYS-5.agdb
/title,FreqDivFUll--Modal -Damping off (B5)
/com,--- Data in consistent MKS units.
/units,MKS
/prep7
! Turn off shape checking because checks already performed inside WB mesher.
! See help system for more information.
SHPP,OFF,,NOWARN
etcon,set             ! allow ANSYS to choose best KEYOP's for 180x elements
/com,*********** Nodes for the whole assembly ***********
nblock,3
(1i9,3e20.9e3)
        1    1.770000000E-005    1.830000000E-004    0.000000000E+000
        2    0.000000000E+000    1.830000000E-004    0.000000000E+000
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-1
/com,*********** Elements for Body 1 "Surface Body" ***********
et,1,281
eblock,19,solid,,27
(19i9)
        1        1        1        1        0        0        0        0        8        0        1        3     2837     2836        2     2950     7711     2947     2945
        1        1        1        1        0        0        0        0        8        0        2     2837     2838     2835     2836     7712     7710     7709     7711
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-1
/com,*********** Elements for Body 2 "Surface Body" ***********
et,2,281
eblock,19,solid,,99
(19i9)
        2        2        2        2        0        0        0        0        8        0       28      114       98       99      113     3233     3232     3236     3263
        2        2        2        2        0        0        0        0        8        0       29      114      115       97       98     3264     3230     3229     3233
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-1
/com,*********** Elements for Body 3 "Surface Body" ***********
et,3,281
eblock,19,solid,,99
(19i9)
        3        3        3        3        0        0        0        0        8        0      127      273      332      333      272     3559     3676     3556     3555
        3        3        3        3        0        0        0        0        8        0      128      273      274      331      332     3558     3562     3675     3559
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-1
/com,*********** Elements for Body 4 "Surface Body" ***********
et,4,281
eblock,19,solid,,99
(19i9)
        4        4        4        4        0        0        0        0        8        0      226      471      273      272      470     3560     3555     3557     3815
        4        4        4        4        0        0        0        0        8        0      227      471      472      274      273     3816     3563     3558     3560
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-1
/com,*********** Elements for Body 5 "Surface Body" ***********
et,5,281
eblock,19,solid,,99
(19i9)
        5        5        5        5        0        0        0        0        8        0      325      105      599      401        7     3254     3745     2961     2958
        5        5        5        5        0        0        0        0        8        0      326      105      104      598      599     3250     3252     3942     3254
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-1
/com,*********** Elements for Body 6 "Surface Body" ***********
et,6,281
eblock,19,solid,,144
(19i9)
        6        6        6        6        0        0        0        0        8        0      424      889      745      602      746     4377     3947     3948     4379
        6        6        6        6        0        0        0        0        8        0      425      889      888      744      745     4522     4375     4374     4377
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-1
/com,*********** Elements for Body 7 "Surface Body" ***********
et,7,281
eblock,19,solid,,143
(19i9)
        7        7        7        7        0        0        0        0        8        0      568     1175     1032      890     1033     4949     4523     4524     4950
        7        7        7        7        0        0        0        0        8        0      569     1175     1174     1031     1032     5092     4947     4946     4949
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-1
/com,*********** Elements for Body 8 "Surface Body" ***********
et,8,281
eblock,19,solid,,143
(19i9)
        8        8        8        8        0        0        0        0        8        0      711     1024     1184     1183     1025     4927     5101     4930     4925
        8        8        8        8        0        0        0        0        8        0      712     1183     1182     1026     1025     5100     4933     4928     4930
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-1
/com,*********** Elements for Body 9 "Surface Body" ***********
et,9,281
eblock,19,solid,,144
(19i9)
        9        9        9        9        0        0        0        0        8        0      854      666     1398     1397      667     4142     5314     4145     4140
        9        9        9        9        0        0        0        0        8        0      855      666      665     1399     1398     4137     4139     5315     4142
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-1
/com,*********** Elements for Body 10 "Surface Body" ***********
et,10,281
eblock,19,solid,,27
(19i9)
       10       10       10       10        0        0        0        0        8        0      998      402     2940     2837        3     3747     7713     2950     2949
       10       10       10       10        0        0        0        0        8        0      999     2940     2939     2838     2837     7837     7715     7712     7713
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-1
/com,*********** Elements for Body 11 "UPP" ***********
et,11,281
eblock,19,solid,,27
(19i9)
       11       11       11       11        0        0        0        0        8        0     1025     1465     2785     2784     1464     5389     7609     5386     5383
       11       11       11       11        0        0        0        0        8        0     1026     2785     2786     2783     2784     7610     7608     7607     7609
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-1
/com,*********** Elements for Body 12 "Surface Body" ***********
et,12,281
eblock,19,solid,,27
(19i9)
       12       12       12       12        0        0        0        0        8        0     1052     1469     2733     2888     1468     5399     7509     5395     5394
       12       12       12       12        0        0        0        0        8        0     1053     2733     2734     2887     2888     7508     7511     7787     7509
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-1
/com,*********** Elements for Body 13 "Surface Body" ***********
et,13,281
eblock,19,solid,,27
(19i9)
       13       13       13       13        0        0        0        0        8        0     1079     1468     2914     2785     1465     5396     7611     5389     5387
       13       13       13       13        0        0        0        0        8        0     1080     2914     2913     2786     2785     7812     7613     7610     7611
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-1
/com,*********** Elements for Body 14 "Surface Body" ***********
et,14,281
eblock,19,solid,,27
(19i9)
       14       14       14       14        0        0        0        0        8        0     1106     1472     2732     2733     1469     5403     7507     5399     5397
       14       14       14       14        0        0        0        0        8        0     1107     2732     2731     2734     2733     7505     7506     7508     7507
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-1
/com,*********** Elements for Body 15 "Surface Body" ***********
et,15,281
eblock,19,solid,,206
(19i9)
       15       15       15       15        0        0        0        0        8        0     1133     1686     1479     1478     1685     5418     5415     5416     5829
       15       15       15       15        0        0        0        0        8        0     1134     1686     1687     1480     1479     5831     5420     5417     5418
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-1
/com,*********** Elements for Body 16 "Surface Body" ***********
et,16,281
eblock,19,solid,,206
(19i9)
       16       16       16       16        0        0        0        0        8        0     1339     1893     1686     1685     1892     5832     5829     5830     6238
       16       16       16       16        0        0        0        0        8        0     1340     1893     1894     1687     1686     6239     5834     5831     5832
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-1
/com,*********** Elements for Body 17 "Surface Body" ***********
et,17,281
eblock,19,solid,,205
(19i9)
       17       17       17       17        0        0        0        0        8        0     1545     1464     2095     2094     1465     5384     6439     5388     5383
       17       17       17       17        0        0        0        0        8        0     1546     1464     2299     2096     2095     5385     6444     6441     5384
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-1
/com,*********** Elements for Body 18 "Surface Body" ***********
et,18,281
eblock,19,solid,,205
(19i9)
       18       18       18       18        0        0        0        0        8        0     1750     2115     2523     2522     2114     6502     7273     6499     6497
       18       18       18       18        0        0        0        0        8        0     1751     2115     2116     2524     2523     6500     6505     7274     6502
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-1
/com,*********** Elements for Body 19 "Surface Body" ***********
et,19,281
eblock,19,solid,,1
(19i9)
       19       19       19       19        0        0        0        0        8        0     1955     1463      890        4     1462     4525     2951     2952     5378
-1
/com,*********** Elements for Body 20 "Surface Body" ***********
et,20,281
eblock,19,solid,,1
(19i9)
       20       20       20       20        0        0        0        0        8        0     1956     1470     1033      890     1463     4951     4524     4525     5381
-1
/com,*********** Elements for Body 21 "Surface Body" ***********
et,21,281
eblock,19,solid,,1
(19i9)
       21       21       21       21        0        0        0        0        8        0     1957     1468     1465     2094     1469     5387     5388     5398     5394
-1
/com,*********** Elements for Body 22 "Surface Body" ***********
et,22,281
eblock,19,solid,,1
(19i9)
       22       22       22       22        0        0        0        0        8        0     1958     2094     2502     1472     1469     6440     5402     5397     5398
-1
/com,*********** Send User Defined Coordinate System(s) ***********
csys,0
toffst,273.15,  ! Temperature offset from absolute zero
/com,*********** Set Reference Temperature ***********
tref,22.
/com,*********** Send Materials ***********
MP,DENS,1,2329,	! kg m^-3
MP,ALPX,1,1.2e-05,	! C^-1
MP,C,1,434,	! J kg^-1 C^-1
MP,KXX,1,60.5,	! W m^-1 C^-1
MP,RSVX,1,1.7e-07,	! kg m^3 A^-2 s^-3
MP,EX,1,148000000000,	! Pa
MP,NUXY,1,0.3,
MP,MURX,1,10000,

MP,DENS,2,2329,	! kg m^-3
MP,ALPX,2,1.2e-05,	! C^-1
MP,C,2,434,	! J kg^-1 C^-1
MP,KXX,2,60.5,	! W m^-1 C^-1
MP,RSVX,2,1.7e-07,	! kg m^3 A^-2 s^-3
MP,EX,2,148000000000,	! Pa
MP,NUXY,2,0.3,
MP,MURX,2,10000,

MP,DENS,3,2329,	! kg m^-3
MP,ALPX,3,1.2e-05,	! C^-1
MP,C,3,434,	! J kg^-1 C^-1
MP,KXX,3,60.5,	! W m^-1 C^-1
MP,RSVX,3,1.7e-07,	! kg m^3 A^-2 s^-3
MP,EX,3,148000000000,	! Pa
MP,NUXY,3,0.3,
MP,MURX,3,10000,

MP,DENS,4,2329,	! kg m^-3
MP,ALPX,4,1.2e-05,	! C^-1
MP,C,4,434,	! J kg^-1 C^-1
MP,KXX,4,60.5,	! W m^-1 C^-1
MP,RSVX,4,1.7e-07,	! kg m^3 A^-2 s^-3
MP,EX,4,148000000000,	! Pa
MP,NUXY,4,0.3,
MP,MURX,4,10000,

MP,DENS,5,2329,	! kg m^-3
MP,ALPX,5,1.2e-05,	! C^-1
MP,C,5,434,	! J kg^-1 C^-1
MP,KXX,5,60.5,	! W m^-1 C^-1
MP,RSVX,5,1.7e-07,	! kg m^3 A^-2 s^-3
MP,EX,5,148000000000,	! Pa
MP,NUXY,5,0.3,
MP,MURX,5,10000,

MP,DENS,6,2329,	! kg m^-3
MP,ALPX,6,1.2e-05,	! C^-1
MP,C,6,434,	! J kg^-1 C^-1
MP,KXX,6,60.5,	! W m^-1 C^-1
MP,RSVX,6,1.7e-07,	! kg m^3 A^-2 s^-3
MP,EX,6,148000000000,	! Pa
MP,NUXY,6,0.3,
MP,MURX,6,10000,

MP,DENS,7,2329,	! kg m^-3
MP,ALPX,7,1.2e-05,	! C^-1
MP,C,7,434,	! J kg^-1 C^-1
MP,KXX,7,60.5,	! W m^-1 C^-1
MP,RSVX,7,1.7e-07,	! kg m^3 A^-2 s^-3
MP,EX,7,148000000000,	! Pa
MP,NUXY,7,0.3,
MP,MURX,7,10000,

MP,DENS,8,2329,	! kg m^-3
MP,ALPX,8,1.2e-05,	! C^-1
MP,C,8,434,	! J kg^-1 C^-1
MP,KXX,8,60.5,	! W m^-1 C^-1
MP,RSVX,8,1.7e-07,	! kg m^3 A^-2 s^-3
MP,EX,8,148000000000,	! Pa
MP,NUXY,8,0.3,
MP,MURX,8,10000,

MP,DENS,9,2329,	! kg m^-3
MP,ALPX,9,1.2e-05,	! C^-1
MP,C,9,434,	! J kg^-1 C^-1
MP,KXX,9,60.5,	! W m^-1 C^-1
MP,RSVX,9,1.7e-07,	! kg m^3 A^-2 s^-3
MP,EX,9,148000000000,	! Pa
MP,NUXY,9,0.3,
MP,MURX,9,10000,

MP,DENS,10,2329,	! kg m^-3
MP,ALPX,10,1.2e-05,	! C^-1
MP,C,10,434,	! J kg^-1 C^-1
MP,KXX,10,60.5,	! W m^-1 C^-1
MP,RSVX,10,1.7e-07,	! kg m^3 A^-2 s^-3
MP,EX,10,148000000000,	! Pa
MP,NUXY,10,0.3,
MP,MURX,10,10000,

MP,DENS,11,2329,	! kg m^-3
MP,ALPX,11,1.2e-05,	! C^-1
MP,C,11,434,	! J kg^-1 C^-1
MP,KXX,11,60.5,	! W m^-1 C^-1
MP,RSVX,11,1.7e-07,	! kg m^3 A^-2 s^-3
MP,EX,11,148000000000,	! Pa
MP,NUXY,11,0.3,
MP,MURX,11,10000,

MP,DENS,12,2329,	! kg m^-3
MP,ALPX,12,1.2e-05,	! C^-1
MP,C,12,434,	! J kg^-1 C^-1
MP,KXX,12,60.5,	! W m^-1 C^-1
MP,RSVX,12,1.7e-07,	! kg m^3 A^-2 s^-3
MP,EX,12,148000000000,	! Pa
MP,NUXY,12,0.3,
MP,MURX,12,10000,

MP,DENS,13,2329,	! kg m^-3
MP,ALPX,13,1.2e-05,	! C^-1
MP,C,13,434,	! J kg^-1 C^-1
MP,KXX,13,60.5,	! W m^-1 C^-1
MP,RSVX,13,1.7e-07,	! kg m^3 A^-2 s^-3
MP,EX,13,148000000000,	! Pa
MP,NUXY,13,0.3,
MP,MURX,13,10000,

MP,DENS,14,2329,	! kg m^-3
MP,ALPX,14,1.2e-05,	! C^-1
MP,C,14,434,	! J kg^-1 C^-1
MP,KXX,14,60.5,	! W m^-1 C^-1
MP,RSVX,14,1.7e-07,	! kg m^3 A^-2 s^-3
MP,EX,14,148000000000,	! Pa
MP,NUXY,14,0.3,
MP,MURX,14,10000,

MP,DENS,15,2329,	! kg m^-3
MP,ALPX,15,1.2e-05,	! C^-1
MP,C,15,434,	! J kg^-1 C^-1
MP,KXX,15,60.5,	! W m^-1 C^-1
MP,RSVX,15,1.7e-07,	! kg m^3 A^-2 s^-3
MP,EX,15,148000000000,	! Pa
MP,NUXY,15,0.3,
MP,MURX,15,10000,

MP,DENS,16,2329,	! kg m^-3
MP,ALPX,16,1.2e-05,	! C^-1
MP,C,16,434,	! J kg^-1 C^-1
MP,KXX,16,60.5,	! W m^-1 C^-1
MP,RSVX,16,1.7e-07,	! kg m^3 A^-2 s^-3
MP,EX,16,148000000000,	! Pa
MP,NUXY,16,0.3,
MP,MURX,16,10000,

MP,DENS,17,2329,	! kg m^-3
MP,ALPX,17,1.2e-05,	! C^-1
MP,C,17,434,	! J kg^-1 C^-1
MP,KXX,17,60.5,	! W m^-1 C^-1
MP,RSVX,17,1.7e-07,	! kg m^3 A^-2 s^-3
MP,EX,17,148000000000,	! Pa
MP,NUXY,17,0.3,
MP,MURX,17,10000,

MP,DENS,18,2329,	! kg m^-3
MP,ALPX,18,1.2e-05,	! C^-1
MP,C,18,434,	! J kg^-1 C^-1
MP,KXX,18,60.5,	! W m^-1 C^-1
MP,RSVX,18,1.7e-07,	! kg m^3 A^-2 s^-3
MP,EX,18,148000000000,	! Pa
MP,NUXY,18,0.3,
MP,MURX,18,10000,

MP,DENS,19,2329,	! kg m^-3
MP,ALPX,19,1.2e-05,	! C^-1
MP,C,19,434,	! J kg^-1 C^-1
MP,KXX,19,60.5,	! W m^-1 C^-1
MP,RSVX,19,1.7e-07,	! kg m^3 A^-2 s^-3
MP,EX,19,148000000000,	! Pa
MP,NUXY,19,0.3,
MP,MURX,19,10000,

MP,DENS,20,2329,	! kg m^-3
MP,ALPX,20,1.2e-05,	! C^-1
MP,C,20,434,	! J kg^-1 C^-1
MP,KXX,20,60.5,	! W m^-1 C^-1
MP,RSVX,20,1.7e-07,	! kg m^3 A^-2 s^-3
MP,EX,20,148000000000,	! Pa
MP,NUXY,20,0.3,
MP,MURX,20,10000,

MP,DENS,21,2329,	! kg m^-3
MP,ALPX,21,1.2e-05,	! C^-1
MP,C,21,434,	! J kg^-1 C^-1
MP,KXX,21,60.5,	! W m^-1 C^-1
MP,RSVX,21,1.7e-07,	! kg m^3 A^-2 s^-3
MP,EX,21,148000000000,	! Pa
MP,NUXY,21,0.3,
MP,MURX,21,10000,

MP,DENS,22,2329,	! kg m^-3
MP,ALPX,22,1.2e-05,	! C^-1
MP,C,22,434,	! J kg^-1 C^-1
MP,KXX,22,60.5,	! W m^-1 C^-1
MP,RSVX,22,1.7e-07,	! kg m^3 A^-2 s^-3
MP,EX,22,148000000000,	! Pa
MP,NUXY,22,0.3,
MP,MURX,22,10000,

/com,*********** Send Sheet Properties ***********
sectype,1,shell
secdata,1.e-005
secoff,mid
sectype,2,shell
secdata,1.e-005
secoff,mid
sectype,3,shell
secdata,1.e-005
secoff,mid
sectype,4,shell
secdata,1.e-005
secoff,mid
sectype,5,shell
secdata,1.e-005
secoff,mid
sectype,6,shell
secdata,1.e-005
secoff,mid
sectype,7,shell
secdata,1.e-005
secoff,mid
sectype,8,shell
secdata,1.e-005
secoff,mid
sectype,9,shell
secdata,1.e-005
secoff,mid
sectype,10,shell
secdata,1.e-005
secoff,mid
sectype,11,shell
secdata,1.e-005
secoff,mid
sectype,12,shell
secdata,1.e-005
secoff,mid
sectype,13,shell
secdata,1.e-005
secoff,mid
sectype,14,shell
secdata,1.e-005
secoff,mid
sectype,15,shell
secdata,1.e-005
secoff,mid
sectype,16,shell
secdata,1.e-005
secoff,mid
sectype,17,shell
secdata,1.e-005
secoff,mid
sectype,18,shell
secdata,1.e-005
secoff,mid
sectype,19,shell
secdata,1.e-005
secoff,mid
sectype,20,shell
secdata,1.e-005
secoff,mid
sectype,21,shell
secdata,1.e-005
secoff,mid
sectype,22,shell
secdata,1.e-005
secoff,mid
!************************* Model Summary ********************
!Surface Body,	Structural Steel,	matid,	1
!Surface Body,	Structural Steel,	matid,	2
!Surface Body,	Structural Steel,	matid,	3
!Surface Body,	Structural Steel,	matid,	4
!Surface Body,	Structural Steel,	matid,	5
!Surface Body,	Structural Steel,	matid,	6
!Surface Body,	Structural Steel,	matid,	7
!Surface Body,	Structural Steel,	matid,	8
!Surface Body,	Structural Steel,	matid,	9
!Surface Body,	Structural Steel,	matid,	10
!UPP,	Structural Steel,	matid,	11
!Surface Body,	Structural Steel,	matid,	12
!Surface Body,	Structural Steel,	matid,	13
!Surface Body,	Structural Steel,	matid,	14
!Surface Body,	Structural Steel,	matid,	15
!Surface Body,	Structural Steel,	matid,	16
!Surface Body,	Structural Steel,	matid,	17
!Surface Body,	Structural Steel,	matid,	18
!Surface Body,	Structural Steel,	matid,	19
!Surface Body,	Structural Steel,	matid,	20
!Surface Body,	Structural Steel,	matid,	21
!Surface Body,	Structural Steel,	matid,	22
!************************* End Model Summary ********************
/com,*********** Create Contact "Contact Region" ***********
*set,tid,24
*set,cid,23
r,tid
r,cid
et,tid,170
et,cid,174
eblock,10,,,3
(15i9)
     1959       24       24       24        0     1178     1030     1031     1177     4945     4943     4948     5095
     1960       24       24       24        0     1177     1031     1032        1     4948     4946     2942     2943
     1961       24       24       24        0        1     1032      890        4     2942     4523     2951     2941
-1
eblock,10,,,3
(15i9)
     1962       23       23       23        0     1178     1030     1031     1177     4945     4943     4948     5095
     1963       23       23       23        0     1177     1031     1032        1     4948     4946     2942     2943
     1964       23       23       23        0        1     1032      890        4     2942     4523     2951     2941
-1
eblock,10,,,1
(15i9)
     1965       23       24       23        0     1470     1033      890     1463     4951     4524     4525     5381
-1
eblock,10,,,1
(15i9)
     1966       24       23       24        0     1470     1033      890     1463     4951     4524     4525     5381
-1
esel,s,type,,23
cm,_AllContacts,elem
keyo,cid,8,2               ! auto create asymmetric contact (from Program Controlled setting)
keyo,cid,10,2              ! adjust contact stiffness each NR iteration (from Program Controlled setting)
keyo,cid,12,5              ! bonded always
keyo,cid,2,0               ! augmented Lagrange (from Program Controlled setting)
keyo,cid,4,0               ! on Gauss point (from Program Controlled setting)
keyo,cid,9,1               ! ignore initial gaps/penetration
keyo,cid,7,0               ! No Prediction
rmod,tid,3,10.	! FKN
rmod,tid,5,0.	! ICONT
rmod,tid,6,-1.23293736109373e-006	! PINB
rmod,tid,10,0.	! CNOF
rmod,tid,12,0.	! FKT
rmod,cid,3,10.	! FKN
rmod,cid,5,0.	! ICONT
rmod,cid,6,-1.23293736109373e-006	! PINB
rmod,cid,10,0.	! CNOF
rmod,cid,12,0.	! FKT
/com,*********** Create Contact "Contact Region 2" ***********
*set,tid,26
*set,cid,25
r,tid
r,cid
et,tid,170
et,cid,174
eblock,10,,,3
(15i9)
     1967       26       26       26        0     1684     1891     1890     1683     5828     6236     5826     5825
     1968       26       26       26        0     1683     1890     1889     1682     5826     6235     5824     5823
     1969       26       26       26        0     1682     1889     1887     1680     5824     6232     5819     5818
-1
eblock,10,,,3
(15i9)
     1970       25       25       25        0     1684     1891     1890     1683     5828     6236     5826     5825
     1971       25       25       25        0     1683     1890     1889     1682     5826     6235     5824     5823
     1972       25       25       25        0     1682     1889     1887     1680     5824     6232     5819     5818
-1
eblock,10,,,3
(15i9)
     1973       25       26       25        0     2296     2297     2705     2704     7043     7048     7455     7045
     1974       25       26       25        0     2297     2298     2706     2705     7046     7050     7456     7048
     1975       25       26       25        0     2706     2298     1680     1473     7050     5820     5405     5406
-1
eblock,10,,,3
(15i9)
     1976       26       25       26        0     2296     2297     2705     2704     7043     7048     7455     7045
     1977       26       25       26        0     2297     2298     2706     2705     7046     7050     7456     7048
     1978       26       25       26        0     2706     2298     1680     1473     7050     5820     5405     5406
-1
esel,s,type,,25
cm,contactElems2482,elem
cmsel,a,_AllContacts,elem
cm,_AllContacts,elem
cmsel,s,contactElems2482,elem
cmdele,contactElems2482
keyo,cid,8,2               ! auto create asymmetric contact (from Program Controlled setting)
keyo,cid,10,2              ! adjust contact stiffness each NR iteration (from Program Controlled setting)
keyo,cid,12,5              ! bonded always
keyo,cid,2,0               ! augmented Lagrange (from Program Controlled setting)
keyo,cid,4,0               ! on Gauss point (from Program Controlled setting)
keyo,cid,9,1               ! ignore initial gaps/penetration
keyo,cid,7,0               ! No Prediction
rmod,tid,3,10.	! FKN
rmod,tid,5,0.	! ICONT
rmod,tid,6,-1.23293736109373e-006	! PINB
rmod,tid,10,0.	! CNOF
rmod,tid,12,0.	! FKT
rmod,cid,3,10.	! FKN
rmod,cid,5,0.	! ICONT
rmod,cid,6,-1.23293736109373e-006	! PINB
rmod,cid,10,0.	! CNOF
rmod,cid,12,0.	! FKT
nsel,all
esel,all
/com,*********** Fixed Supports ***********
CMBLOCK,_FIXEDSU,NODE,       20
(8i10)
         5         6       501       600       601      1318      1466      1467
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cmsel,s,_FIXEDSU
d,all,all
nsel,all
nsel,all
fini
/solu
antype,2                   ! modal analysis
modopt,lanb,15
outres,erase
outres,all,none
outres,nsol,all
mxpand                    ! default expand in case of complex solution
! *********** WB SOLVE COMMAND ***********
! check interactive state
*get,ANSINTER_,active,,int
*if,ANSINTER_,ne,0,then
/eof
*endif
solve
/com *************** Write FE CONNECTORS *********
CEWRITE,file,ce,,INTE
fini
/post1
fini
