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/batch
! ANSYS input file written by Workbench version 15.0.7  Release
! File used for geometry attach: C:\Users\mosta\OneDrive\Documents\ANSYS\Freqdiv_nodamp\30_nodamp_files\dp0\SYS-5\DM\SYS-5.agdb
/title,30_nodamp--Modal -Damping off (D5)
/com,--- Data in consistent MKS units.
/units,MKS
/prep7
! Turn off shape checking because checks already performed inside WB mesher.
! See help system for more information.
SHPP,OFF,,NOWARN
etcon,set             ! allow ANSYS to choose best KEYOP's for 180x elements
/com,*********** Nodes for the whole assembly ***********
nblock,3
(1i9,3e20.9e3)
        1    1.770000000E-005    1.830000000E-004    0.000000000E+000
        2    0.000000000E+000    1.830000000E-004    0.000000000E+000
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-1
/com,*********** Elements for Body 1 "Surface Body" ***********
et,1,281
eblock,19,solid,,27
(19i9)
        1        1        1        1        0        0        0        0        8        0        1        3     1494     1493        2     1633     4122     1630     1628
        1        1        1        1        0        0        0        0        8        0        2     1494     1495     1492     1493     4123     4121     4120     4122
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-1
/com,*********** Elements for Body 2 "Surface Body" ***********
et,2,281
eblock,19,solid,,99
(19i9)
        2        2        2        2        0        0        0        0        8        0       28      108      104      105      107     1934     1933     1936     1940
        2        2        2        2        0        0        0        0        8        0       29      108      109      103      104     1941     1931     1930     1934
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-1
/com,*********** Elements for Body 3 "Surface Body" ***********
et,3,281
eblock,19,solid,,99
(19i9)
        3        3        3        3        0        0        0        0        8        0      127      273      332      333      272     2242     2359     2239     2238
        3        3        3        3        0        0        0        0        8        0      128      273      274      331      332     2241     2245     2358     2242
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-1
/com,*********** Elements for Body 4 "Surface Body" ***********
et,4,281
eblock,19,solid,,99
(19i9)
        4        4        4        4        0        0        0        0        8        0      226      471      273      272      470     2243     2238     2240     2498
        4        4        4        4        0        0        0        0        8        0      227      471      472      274      273     2499     2246     2241     2243
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-1
/com,*********** Elements for Body 5 "Surface Body" ***********
et,5,281
eblock,19,solid,,99
(19i9)
        5        5        5        5        0        0        0        0        8        0      325        9      503      504       10     1650     2530     1653     1648
        5        5        5        5        0        0        0        0        8        0      326        9        8      502      503     1645     1647     2529     1650
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-1
/com,*********** Elements for Body 6 "Surface Body" ***********
et,6,281
eblock,19,solid,,144
(19i9)
        6        6        6        6        0        0        0        0        8        0      424      889      745      602      746     3060     2630     2631     3062
        6        6        6        6        0        0        0        0        8        0      425      889      888      744      745     3205     3058     3057     3060
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-1
/com,*********** Elements for Body 7 "Surface Body" ***********
et,7,281
eblock,19,solid,,143
(19i9)
        7        7        7        7        0        0        0        0        8        0      568     1175     1032      890     1033     3632     3206     3207     3633
        7        7        7        7        0        0        0        0        8        0      569     1175     1174     1031     1032     3775     3630     3629     3632
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-1
/com,*********** Elements for Body 8 "Surface Body" ***********
et,8,281
eblock,19,solid,,143
(19i9)
        8        8        8        8        0        0        0        0        8        0      711     1024     1184     1183     1025     3610     3784     3613     3608
        8        8        8        8        0        0        0        0        8        0      712     1183     1182     1026     1025     3783     3616     3611     3613
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-1
/com,*********** Elements for Body 9 "Surface Body" ***********
et,9,281
eblock,19,solid,,144
(19i9)
        9        9        9        9        0        0        0        0        8        0      854     1376      688      687     1377     2891     2886     2888     3976
        9        9        9        9        0        0        0        0        8        0      855     1376     1375      689      688     3975     2894     2889     2891
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-1
/com,*********** Elements for Body 10 "Surface Body" ***********
et,10,281
eblock,19,solid,,27
(19i9)
       10       10       10       10        0        0        0        0        8        0      998      402     1597     1494        3     2430     4124     1633     1632
       10       10       10       10        0        0        0        0        8        0      999     1597     1596     1495     1494     4300     4126     4123     4124
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-1
/com,*********** Elements for Body 11 "Surface Body" ***********
et,11,281
eblock,19,solid,,27
(19i9)
       11       11       11       11        0        0        0        0        8        0     1025     1462     1598     1571     1463     4063     4275     4065     4061
       11       11       11       11        0        0        0        0        8        0     1026     1598     1599     1570     1571     4301     4274     4273     4275
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-1
/com,*********** Elements for Body 12 "Surface Body" ***********
et,12,281
eblock,19,solid,,27
(19i9)
       12       12       12       12        0        0        0        0        8        0     1052     1466     1520     1571     1463     4070     4175     4065     4064
       12       12       12       12        0        0        0        0        8        0     1053     1520     1521     1570     1571     4174     4177     4273     4175
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-1
/com,*********** Elements for Body 13 "Surface Body" ***********
et,13,281
eblock,19,solid,,1
(19i9)
       13       13       13       13        0        0        0        0        8        0     1079      890        4     1462     1463     1634     1635     4061     3208
-1
/com,*********** Elements for Body 14 "Surface Body" ***********
et,14,281
eblock,19,solid,,1
(19i9)
       14       14       14       14        0        0        0        0        8        0     1080      890     1463     1466     1033     3208     4064     3634     3207
-1
/com,*********** Send User Defined Coordinate System(s) ***********
csys,0
toffst,273.15,  ! Temperature offset from absolute zero
/com,*********** Set Reference Temperature ***********
tref,22.
/com,*********** Send Materials ***********
MP,DENS,1,2329,	! kg m^-3
MP,ALPX,1,1.2e-05,	! C^-1
MP,C,1,434,	! J kg^-1 C^-1
MP,KXX,1,60.5,	! W m^-1 C^-1
MP,RSVX,1,1.7e-07,	! kg m^3 A^-2 s^-3
MP,EX,1,148000000000,	! Pa
MP,NUXY,1,0.3,
MP,MURX,1,10000,
MP,ALPD,1,0,

MP,DENS,2,2329,	! kg m^-3
MP,ALPX,2,1.2e-05,	! C^-1
MP,C,2,434,	! J kg^-1 C^-1
MP,KXX,2,60.5,	! W m^-1 C^-1
MP,RSVX,2,1.7e-07,	! kg m^3 A^-2 s^-3
MP,EX,2,148000000000,	! Pa
MP,NUXY,2,0.3,
MP,MURX,2,10000,
MP,ALPD,2,0,

MP,DENS,3,2329,	! kg m^-3
MP,ALPX,3,1.2e-05,	! C^-1
MP,C,3,434,	! J kg^-1 C^-1
MP,KXX,3,60.5,	! W m^-1 C^-1
MP,RSVX,3,1.7e-07,	! kg m^3 A^-2 s^-3
MP,EX,3,148000000000,	! Pa
MP,NUXY,3,0.3,
MP,MURX,3,10000,
MP,ALPD,3,0,

MP,DENS,4,2329,	! kg m^-3
MP,ALPX,4,1.2e-05,	! C^-1
MP,C,4,434,	! J kg^-1 C^-1
MP,KXX,4,60.5,	! W m^-1 C^-1
MP,RSVX,4,1.7e-07,	! kg m^3 A^-2 s^-3
MP,EX,4,148000000000,	! Pa
MP,NUXY,4,0.3,
MP,MURX,4,10000,
MP,ALPD,4,0,

MP,DENS,5,2329,	! kg m^-3
MP,ALPX,5,1.2e-05,	! C^-1
MP,C,5,434,	! J kg^-1 C^-1
MP,KXX,5,60.5,	! W m^-1 C^-1
MP,RSVX,5,1.7e-07,	! kg m^3 A^-2 s^-3
MP,EX,5,148000000000,	! Pa
MP,NUXY,5,0.3,
MP,MURX,5,10000,
MP,ALPD,5,0,

MP,DENS,6,2329,	! kg m^-3
MP,ALPX,6,1.2e-05,	! C^-1
MP,C,6,434,	! J kg^-1 C^-1
MP,KXX,6,60.5,	! W m^-1 C^-1
MP,RSVX,6,1.7e-07,	! kg m^3 A^-2 s^-3
MP,EX,6,148000000000,	! Pa
MP,NUXY,6,0.3,
MP,MURX,6,10000,
MP,ALPD,6,0,

MP,DENS,7,2329,	! kg m^-3
MP,ALPX,7,1.2e-05,	! C^-1
MP,C,7,434,	! J kg^-1 C^-1
MP,KXX,7,60.5,	! W m^-1 C^-1
MP,RSVX,7,1.7e-07,	! kg m^3 A^-2 s^-3
MP,EX,7,148000000000,	! Pa
MP,NUXY,7,0.3,
MP,MURX,7,10000,
MP,ALPD,7,0,

MP,DENS,8,2329,	! kg m^-3
MP,ALPX,8,1.2e-05,	! C^-1
MP,C,8,434,	! J kg^-1 C^-1
MP,KXX,8,60.5,	! W m^-1 C^-1
MP,RSVX,8,1.7e-07,	! kg m^3 A^-2 s^-3
MP,EX,8,148000000000,	! Pa
MP,NUXY,8,0.3,
MP,MURX,8,10000,
MP,ALPD,8,0,

MP,DENS,9,2329,	! kg m^-3
MP,ALPX,9,1.2e-05,	! C^-1
MP,C,9,434,	! J kg^-1 C^-1
MP,KXX,9,60.5,	! W m^-1 C^-1
MP,RSVX,9,1.7e-07,	! kg m^3 A^-2 s^-3
MP,EX,9,148000000000,	! Pa
MP,NUXY,9,0.3,
MP,MURX,9,10000,
MP,ALPD,9,0,

MP,DENS,10,2329,	! kg m^-3
MP,ALPX,10,1.2e-05,	! C^-1
MP,C,10,434,	! J kg^-1 C^-1
MP,KXX,10,60.5,	! W m^-1 C^-1
MP,RSVX,10,1.7e-07,	! kg m^3 A^-2 s^-3
MP,EX,10,148000000000,	! Pa
MP,NUXY,10,0.3,
MP,MURX,10,10000,
MP,ALPD,10,0,

MP,DENS,11,2329,	! kg m^-3
MP,ALPX,11,1.2e-05,	! C^-1
MP,C,11,434,	! J kg^-1 C^-1
MP,KXX,11,60.5,	! W m^-1 C^-1
MP,RSVX,11,1.7e-07,	! kg m^3 A^-2 s^-3
MP,EX,11,148000000000,	! Pa
MP,NUXY,11,0.3,
MP,MURX,11,10000,
MP,ALPD,11,0,

MP,DENS,12,2329,	! kg m^-3
MP,ALPX,12,1.2e-05,	! C^-1
MP,C,12,434,	! J kg^-1 C^-1
MP,KXX,12,60.5,	! W m^-1 C^-1
MP,RSVX,12,1.7e-07,	! kg m^3 A^-2 s^-3
MP,EX,12,148000000000,	! Pa
MP,NUXY,12,0.3,
MP,MURX,12,10000,
MP,ALPD,12,0,

MP,DENS,13,2329,	! kg m^-3
MP,ALPX,13,1.2e-05,	! C^-1
MP,C,13,434,	! J kg^-1 C^-1
MP,KXX,13,60.5,	! W m^-1 C^-1
MP,RSVX,13,1.7e-07,	! kg m^3 A^-2 s^-3
MP,EX,13,148000000000,	! Pa
MP,NUXY,13,0.3,
MP,MURX,13,10000,
MP,ALPD,13,0,

MP,DENS,14,2329,	! kg m^-3
MP,ALPX,14,1.2e-05,	! C^-1
MP,C,14,434,	! J kg^-1 C^-1
MP,KXX,14,60.5,	! W m^-1 C^-1
MP,RSVX,14,1.7e-07,	! kg m^3 A^-2 s^-3
MP,EX,14,148000000000,	! Pa
MP,NUXY,14,0.3,
MP,MURX,14,10000,
MP,ALPD,14,0,

/com,*********** Send Sheet Properties ***********
sectype,1,shell
secdata,1.e-005
secoff,mid
sectype,2,shell
secdata,1.e-005
secoff,mid
sectype,3,shell
secdata,1.e-005
secoff,mid
sectype,4,shell
secdata,1.e-005
secoff,mid
sectype,5,shell
secdata,1.e-005
secoff,mid
sectype,6,shell
secdata,1.e-005
secoff,mid
sectype,7,shell
secdata,1.e-005
secoff,mid
sectype,8,shell
secdata,1.e-005
secoff,mid
sectype,9,shell
secdata,1.e-005
secoff,mid
sectype,10,shell
secdata,1.e-005
secoff,mid
sectype,11,shell
secdata,1.e-005
secoff,mid
sectype,12,shell
secdata,1.e-005
secoff,mid
sectype,13,shell
secdata,1.e-005
secoff,mid
sectype,14,shell
secdata,1.e-005
secoff,mid
!************************* Model Summary ********************
!Surface Body,	Structural Steel,	matid,	1
!Surface Body,	Structural Steel,	matid,	2
!Surface Body,	Structural Steel,	matid,	3
!Surface Body,	Structural Steel,	matid,	4
!Surface Body,	Structural Steel,	matid,	5
!Surface Body,	Structural Steel,	matid,	6
!Surface Body,	Structural Steel,	matid,	7
!Surface Body,	Structural Steel,	matid,	8
!Surface Body,	Structural Steel,	matid,	9
!Surface Body,	Structural Steel,	matid,	10
!Surface Body,	Structural Steel,	matid,	11
!Surface Body,	Structural Steel,	matid,	12
!Surface Body,	Structural Steel,	matid,	13
!Surface Body,	Structural Steel,	matid,	14
!************************* End Model Summary ********************
/com,*********** Fixed Supports ***********
CMBLOCK,_FIXEDSU,NODE,       15
(8i10)
         5         6       501       600       601      1318      1464      1465
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cmsel,s,_FIXEDSU
d,all,all
nsel,all
nsel,all
fini
/solu
antype,2                   ! modal analysis
modopt,lanb,15
outres,erase
outres,all,none
outres,nsol,all
mxpand                    ! default expand in case of complex solution
! *********** WB SOLVE COMMAND ***********
! check interactive state
*get,ANSINTER_,active,,int
*if,ANSINTER_,ne,0,then
/eof
*endif
solve
/com *************** Write FE CONNECTORS *********
CEWRITE,file,ce,,INTE
fini
/post1
fini
