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/batch
! ANSYS input file written by Workbench version 15.0.7  Release
! File used for geometry attach: C:\Users\mosta\OneDrive\Documents\ANSYS\QalandarGeom\QG_files\dp0\SYS\DM\SYS.agdb
/title,QG--Transient 4 (F5)
/com,--- Data in consistent MKS units.
/units,MKS
/prep7
! Turn off shape checking because checks already performed inside WB mesher.
! See help system for more information.
SHPP,OFF,,NOWARN
etcon,set             ! allow ANSYS to choose best KEYOP's for 180x elements
/com,*********** Nodes for the whole assembly ***********
nblock,3
(1i9,3e20.9e3)
        1    4.615000000E-005   -1.030000000E-005    0.000000000E+000
        2    4.615000000E-005   -3.865200000E-004    0.000000000E+000
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-1
/com,*********** Elements for Body 1 "Surface Body" ***********
et,1,183
keyo,1,3,3
eblock,19,solid,,636
(19i9)
        1        1        1        1        0        0        0        0        8        0        1      622      704      703      623     2355     2477     2357     2354
        1        1        1        1        0        0        0        0        8        0        2      703      702      624      623     2476     2359     2356     2357
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-1
/com,*********** Send User Defined Coordinate System(s) ***********
csys,0
toffst,273.15,  ! Temperature offset from absolute zero
/com,*********** Set Reference Temperature ***********
tref,22.
/com,*********** Send Materials ***********
MP,DENS,1,2329,	! kg m^-3
MP,ALPX,1,1.2e-05,	! C^-1
MP,C,1,434,	! J kg^-1 C^-1
MP,KXX,1,60.5,	! W m^-1 C^-1
MP,RSVX,1,1.7e-07,	! kg m^3 A^-2 s^-3
MP,EX,1,170000000000,	! Pa
MP,NUXY,1,0.33,
MP,MURX,1,10000,

/com,*********** Send Sheet Properties ***********
r,1,1.e-005
!************************* Model Summary ********************
!Surface Body,	Structural Steel,	matid,	1
!************************* End Model Summary ********************
CMBLOCK,SELECTION,NODE,       22
(8i10)
      2508      2547      2549      2551      2553      2555      2557      2559
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CMBLOCK,C_0TH   ,NODE,        1
(8i10)
      2564
CMBLOCK,C_2TH   ,NODE,        1
(8i10)
      2754
CMBLOCK,C_3RD   ,NODE,        1
(8i10)
      2144
CMBLOCK,C_4TH   ,NODE,        1
(8i10)
      1483
CMBLOCK,C_1ST   ,NODE,        1
(8i10)
      2371
/com,*********** Fixed Supports ***********
CMBLOCK,_FIXEDSU,NODE,       18
(8i10)
         2       206       226       267       410       593       663       753
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cmsel,s,_FIXEDSU
d,all,all
nsel,all
nsel,all
/com,*********** Create Direct FE , Forces ****
CMBLOCK,_CM478F ,NODE,        1
(8i10)
      2564
!
! ANSYS Function Representation
!
*DIM,_loadvari478x,TABLE,6,8,2,,,,0
!
! Begin of equation: time (N)
_loadvari478x(0,0,1)= 0, -999
_loadvari478x(2,0,1)= 0.0
_loadvari478x(3,0,1)= 0.0
_loadvari478x(4,0,1)= 0.0
_loadvari478x(5,0,1)= 0.0
_loadvari478x(6,0,1)= 0.0
_loadvari478x(0,1,1)= 1.0, -1, 0, 0.000001, 0, 0, 1
_loadvari478x(0,2,1)= 0.0, -2, 0, 1, 1, 3, -1
_loadvari478x(0,3,1)=   0, 99, 0, 1, -2, 0, 0
_loadvari478x(0,4,1)= 0.0,
_loadvari478x(0,5,1)= 0.0,
_loadvari478x(0,6,1)= 0.0,
_loadvari478x(0,7,1)= 0.0,
_loadvari478x(0,8,1)= 0.0,
! End of equation: time (N)
!
! Begin of equation: 500*sin(5529203.07*time) (N)
_loadvari478x(0,0,2)= -999, -999
_loadvari478x(2,0,2)= 0.0
_loadvari478x(3,0,2)= 0.0
_loadvari478x(4,0,2)= 0.0
_loadvari478x(5,0,2)= 0.0
_loadvari478x(6,0,2)= 0.0
_loadvari478x(0,1,2)= 1.0, -1, 0, 5529203.07, 0, 0, 1
_loadvari478x(0,2,2)= 0.0, -2, 0, 1, -1, 3, 1
_loadvari478x(0,3,2)=   0, -1, 9, 1, -2, 0, 0
_loadvari478x(0,4,2)= 0.0, -2, 0, 500, 0, 0, -1
_loadvari478x(0,5,2)= 0.0, -3, 0, 1, -2, 3, -1
_loadvari478x(0,6,2)= 0.0, -1, 0, 0.000001, 0, 0, -3
_loadvari478x(0,7,2)= 0.0, -2, 0, 1, -3, 3, -1
_loadvari478x(0,8,2)= 0.0, 99, 0, 1, -2, 0, 0
! End of equation: 500*sin(5529203.07*time) (N)


*DIM,_loadvari478y,TABLE,1,1,1,TIME,
! Time values
_loadvari478y(1,0,1) = 2.e-003
! Load values
_loadvari478y(1,1,1) = 0.


*DIM,_loadvari478z,TABLE,1,1,1,TIME,
! Time values
_loadvari478z(1,0,1) = 2.e-003
! Load values
_loadvari478z(1,1,1) = 0.

fini
/com,****************************************************************************
/com,*************************    SOLUTION       ********************************
/com,****************************************************************************
/solu
antype,4                   ! transient analysis
nlgeom,on                  ! Turn on Large Deformation Effects
solc,on,on                 ! Turn on solution control with ability to use contact time prediction
kbc,1                      ! stepped BC's
eqsl,sparse,,,,,1
nropt,full                 ! Use full Newton-Raphson
cntr,print,1               ! print out contact info and also make no initial contact an error
dmpopt,emat,no             ! Don't combine emat file for DANSYS
dmpopt,esav,no             ! Don't combine esav file for DANSYS
trnopt,full,,,,,hht        ! HHT time integration method
alphad,761.	! Alpha damping
betad,1.96e-010	! Beta damping, frequency dependent
tintp,0.1	! Numerical Damping
nldiag,cont,iter           ! print out contact info each equilibrium iteration
resc,,none                 ! Do not keep any restart files
/com,****************************************************
/com,******************* SOLVE FOR LS 1 ****************
/com,**** Set Direct FE , Forces ****
f,_CM478F,fx,%_loadvari478x%
f,_CM478F,fy,%_loadvari478y%
f,_CM478F,fz,%_loadvari478z%
autots,off                 ! User turned off automatic time stepping
deltim,2.27273e-008,2.27273e-008,2.27273e-008
time,4.e-003
timint,on                  ! Turn on time integration effects
outres,erase
outres,all,none
outres,nsol,all
outres,rsol,all
outres,v,all
outres,a,all
stabilize,off                   ! Stabilization turned OFF by user
! *********** WB SOLVE COMMAND ***********
! check interactive state
*get,ANSINTER_,active,,int
*if,ANSINTER_,ne,0,then
/eof
*endif
solve
/com *************** Write FE CONNECTORS *********
CEWRITE,file,ce,,INTE
/com,****************************************************
/com,*************** FINISHED SOLVE FOR LS 1 *************
*set,_DS_PROGRESS          ! turn off progress updates to avoid virus scanning bug
/post1
fini
