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/batch
! ANSYS input file written by Workbench version 15.0.7  Release
! File used for geometry attach: C:\Users\mosta\OneDrive\Documents\ANSYS\TEST1\BEAM_files\dp0\SYS\DM\SYS.agdb
/title,BEAM--Modal (A5)
/com,--- Data in consistent uMKS units.
/units,uMKS
/prep7
! Turn off shape checking because checks already performed inside WB mesher.
! See help system for more information.
SHPP,OFF,,NOWARN
ncnv,1,1e9             ! uMKS system, Increase DOF limit to 1e9
etcon,set             ! allow ANSYS to choose best KEYOP's for 180x elements
/com,*********** Nodes for the whole assembly ***********
nblock,3
(1i9,3e20.9e3)
        1    2.000000000E-009    1.000000000E+005    0.000000000E+000
        2    2.000000000E-009    0.000000000E+000    0.000000000E+000
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-1
/com,*********** Elements for Body 1 "Surface Body" ***********
et,1,281
eblock,19,solid,,160
(19i9)
        1        1        1        1        0        0        0        0        8        0        1       89      163      162       96      381      526      403      379
        1        1        1        1        0        0        0        0        8        0        2      147       89       96      148      380      379      402      507
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-1
/com,*********** Send User Defined Coordinate System(s) ***********
csys,0
toffst,273.15,  ! Temperature offset from absolute zero
/com,*********** Set Reference Temperature ***********
tref,22.
/com,*********** Send Materials ***********
MP,DENS,1,7.85e-15,	! kg um^-3
MP,ALPX,1,1.2e-05,	! C^-1
MP,C,1,434000000000000,	! pJ kg^-1 C^-1
MP,KXX,1,60500000,	! pW um^-1 C^-1
MP,RSVX,1,1.7e-13,	! Tohm um
MP,EX,1,200000,	! MPa
MP,NUXY,1,0.3,
MP,MURX,1,10000,

/com,*********** Send Sheet Properties ***********
sectype,1,shell
secdata,20000.
secoff,mid
!************************* Model Summary ********************
!Surface Body,	Structural Steel,	matid,	1
!************************* End Model Summary ********************
/com,*********** Fixed Supports ***********
CMBLOCK,_FIXEDSU,NODE,       18
(8i10)
         1         2         3         4         5         6        46        47
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cmsel,s,_FIXEDSU
d,all,all
nsel,all
nsel,all
fini
/solu
antype,2                   ! modal analysis
modopt,lanb,6
outres,erase
outres,all,none
outres,nsol,all
mxpand                    ! default expand in case of complex solution
! *********** WB SOLVE COMMAND ***********
! check interactive state
*get,ANSINTER_,active,,int
*if,ANSINTER_,ne,0,then
/eof
*endif
solve
/com *************** Write FE CONNECTORS *********
CEWRITE,file,ce,,INTE
fini
/post1
fini
