*Heading
** Job name: shark620 Model name: Model-1
** Generated by: Abaqus/CAE 2021
*Preprint, echo=NO, model=NO, history=NO, contact=NO
**
** PARTS
**
*Part, name=shark
*End Part
**
**
** ASSEMBLY
**
*Assembly, name=Assembly
**
*Instance, name=shark-1, part=shark
*Node
      1, -0.484504998, -0.0538330004,  0.145741001
      2, -0.484618992, -0.0537610017,  0.184354007
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*Element, type=S4R
1,   1,   2, 289, 290
2, 290, 289,   3,   4
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*Element, type=S3
3,   7, 291,   8
4,   8,   5,   6
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*End Instance
**
*End Assembly
**
** MATERIALS
**
*Material, name=Material-1
*Elastic
210000., 0.3
** ----------------------------------------------------------------
**
** STEP: Step-1
**
*Step, name=Step-1, nlgeom=NO
*Static
1., 1., 1e-05, 1.
**
** OUTPUT REQUESTS
**
*Restart, write, frequency=0
**
** FIELD OUTPUT: F-Output-1
**
*Output, field, variable=PRESELECT
**
** HISTORY OUTPUT: H-Output-1
**
*Output, history, variable=PRESELECT
*End Step
